dimension 	3
units		lj
boundary 	p p p

atom_style	atomic

########## System setup ##########
variable 	xlo equal 0.0
variable 	xhi equal 10.0
variable 	ylo equal 0.0
variable 	yhi equal 10.0
variable 	zlo equal 0.0
variable 	zhi equal 10.0

variable        srate equal ${strain_rate}	# Strain rate applied

region          myregion prism ${xlo} ${xhi} ${ylo} ${yhi} ${zlo} ${zhi} 0.0 0.0 0.0 	# Define the simulation box region

create_box      1 myregion

create_atoms	1 random 800 87183 myregion # Creates particles with a density of 0.8

mass		1 1.0
write_data	sllod.lmpsys

########## Interaction Potentials ##########
pair_style 	lj/cut 2.5
pair_coeff 	1 1 1.0 1.0
pair_modify	shift yes

##########  Neighbor List and Timestep  ##########
timestep        0.001
neighbor        1.0 bin
neigh_modify    every 1 delay 0 check yes

########## Log output ##########
thermo_style 	custom step temp press density ke pe etotal
thermo 		100
log 		log.dat

########## System minimization ##########
velocity 	all create 1.0 123456 dist gaussian

minimize	1.0e-4 1.0e-4 100000 100000
reset_timestep	0

########## Thermostat-setup (Nos`e-Hoover thermostat) ##########
fix             fxnvt all nvt temp 1.0 1.0 $(100.0*dt)

run             10000
unfix		fxnvt
reset_timestep  0

########## Applying strain rate to the system ##########
fix             fxnvt all nvt/sllod temp 1.0 1.0 $(100.0*dt)		# Used to thermostat a system with changing simulation box size
fix             fxdeform all deform 1 xy erate ${srate} remap v		# Applies an engineering strain rate to the particles.

compute         usual all temp		# Compute the temperature
compute         tilt all temp/deform	# Compute the temperature after removing the bias due to shear

thermo          1000
thermo_style    custom step temp density c_usual epair etotal press pxy v_srate
thermo_modify   temp tilt
run             50000

reset_timestep  0

########## Output Run ##########
compute         computePress all pressure thermo_temp
fix             fxpress all ave/time 1 1 50 c_computePress[*] file ./output/pressure-${srate}.dat	# Pressure tensor values at every 50th timestep will be saved

run             100000
